// COMSOL Multiphysics 6.3.0.290 model "minimal_test.mph"
// Outline of the model tree

Parameters
  test_size = 100[mm]
  test_power = 10[W]
  ambient_temp = 293.15[K]

Couplings
  maxop1: Maximum "最大值 1" on all domains
  aveop1: Average "平均值 1" on all domains
  intop1: Integration "积分 1" on all domains

Geometry
  geom1 "几何 1" (3D, length unit m)
    blk1: Block "长方体 1" | size = {test_size, test_size, test_size}; pos = {-test_size/2, -test_size/2, -test_size/2}
    fin: Finalize "形成联合体"

Materials
  mat1: Common "Aluminum" on all domains
    def: def "基本"
      thermalconductivity = 237[W/(m*K)]
      density = 2700[kg/m^3]
      heatcapacity = 900[J/(kg*K)]

Physics
  ht: HeatTransfer "固体传热" on all domains
    dependent variable T
    solid1: SolidHeatTransferModel "固体 1" (default)
    init1: init "初始值 1" (default)
    ins1: ThermalInsulation "热绝缘 1" (default)
    hs1: HeatSource "热源 1" on all domains | Q0 = test_power/(test_size^3*1e-9)
    temp1: TemperatureBoundary "温度 1" on all boundaries | T0 = ambient_temp

Mesh
  mesh1 "网格 1" (physics-controlled)

Studies
  std1 "研究 1"
    stat: Stationary "稳态"