// COMSOL Multiphysics 6.3.0.290 model "satellite_thermal_fixed.mph"
// Outline of the model tree

Parameters
  battery_01_x = 0.0[mm]
  battery_01_y = 0.0[mm]
  battery_01_z = 0.0[mm]
  battery_01_dx = 200.0[mm]
  battery_01_dy = 150.0[mm]
  battery_01_dz = 100.0[mm]
  battery_01_power = 50.0[W]
  payload_01_x = 0.0[mm]
  payload_01_y = 0.0[mm]
  payload_01_z = 150.0[mm]
  payload_01_dx = 180.0[mm]
  payload_01_dy = 180.0[mm]
  payload_01_dz = 120.0[mm]
  payload_01_power = 30.0[W]
  envelope_x = 400.0[mm]
  envelope_y = 400.0[mm]
  envelope_z = 400.0[mm]
  wall_thickness = 5.0[mm]
  T_space = 3[K]
  T_sun = 5778[K]
  solar_flux = 1367[W/m^2]
  emissivity = 0.85
  absorptivity = 0.25

Selections
  sel_comp_0: Explicit "battery_01 Domain" on domains 1
  sel_comp_1: Explicit "payload_01 Domain" on domains 2
  sel_outer_surface: Explicit "Outer Surface" on no boundaries

Couplings
  maxop1: Maximum "Maximum Operator" on all domains
  aveop1: Average "Average Operator" on all domains
  intop1: Integration "Integration Operator" on all domains

Geometry
  geom1 "几何 1" (3D, length unit m)
    comp_0: Block "battery_01"
      size = {battery_01_dx, battery_01_dy, battery_01_dz}
      pos = {battery_01_x-battery_01_dx/2, battery_01_y-battery_01_dy/2, battery_01_z-battery_01_dz/2}
    comp_1: Block "payload_01"
      size = {payload_01_dx, payload_01_dy, payload_01_dz}
      pos = {payload_01_x-payload_01_dx/2, payload_01_y-payload_01_dy/2, payload_01_z-payload_01_dz/2}
    envelope: Block | size = {envelope_x, envelope_y, envelope_z}; pos = {-envelope_x/2, -envelope_y/2, -envelope_z/2}
    fin: Finalize "形成联合体"

Materials
  mat_aluminum: Common "Aluminum" on all domains
    def: def "基本"
      thermalconductivity = 237[W/(m*K)]
      density = 2700[kg/m^3]
      heatcapacity = 900[J/(kg*K)]
      epsilon_rad = 0.85
      rho_rad = 0.15

Physics
  ht: HeatTransfer "Heat Transfer in Solids" on all domains
    dependent variable T
    solid1: SolidHeatTransferModel "固体 1" (default)
    init1: init "初始值 1" (default)
    ins1: ThermalInsulation "热绝缘 1" (default)
    hs_0: HeatSource "battery_01 Heat Source" on selection sel_comp_0
      Q0 = battery_01_power/(battery_01_dx*battery_01_dy*battery_01_dz*1e-9)
    hs_1: HeatSource "payload_01 Heat Source" on selection sel_comp_1
      Q0 = payload_01_power/(payload_01_dx*payload_01_dy*payload_01_dz*1e-9)
    rad1: SurfaceToSurfaceRadiation "Radiation to Deep Space" on all boundaries | Tamb = T_space

Mesh
  mesh1 "网格 1" (physics-controlled)

Studies
  std1 "Steady-State Thermal Analysis"
    stat: Stationary "稳态"