// COMSOL Multiphysics 6.3.0.290 model "satellite_thermal_v3.mph"
// Outline of the model tree

Parameters
  battery_x = 0[mm]
  battery_y = 0[mm]
  battery_z = 0[mm]
  battery_dx = 200[mm]
  battery_dy = 150[mm]
  battery_dz = 100[mm]
  battery_power = 50[W]
  payload_x = 0[mm]
  payload_y = 0[mm]
  payload_z = 150[mm]
  payload_dx = 180[mm]
  payload_dy = 180[mm]
  payload_dz = 120[mm]
  payload_power = 30[W]
  envelope_size = 400[mm]
  wall_thickness = 5[mm]
  ambient_temp = 293.15[K]

Selections
  sel_battery: Explicit "Battery Domain" on domains 1
  sel_payload: Explicit "Payload Domain" on domains 2

Couplings
  maxop1: Maximum "Maximum Operator" on all domains
  aveop1: Average "Average Operator" on all domains
  intop1: Integration "Integration Operator" on all domains

Geometry
  geom1 "几何 1" (3D, length unit m)
    battery: Block
      size = {battery_dx, battery_dy, battery_dz}
      pos = {battery_x-battery_dx/2, battery_y-battery_dy/2, battery_z}
    payload: Block
      size = {payload_dx, payload_dy, payload_dz}
      pos = {payload_x-payload_dx/2, payload_y-payload_dy/2, payload_z}
    envelope: Block
      size = {envelope_size, envelope_size, envelope_size}
      pos = {-envelope_size/2, -envelope_size/2, -envelope_size/2}
    fin: Finalize "形成联合体"

Materials
  mat_aluminum: Common "Aluminum" on all domains
    def: def "基本"
      thermalconductivity = 237[W/(m*K)]
      density = 2700[kg/m^3]
      heatcapacity = 900[J/(kg*K)]

Physics
  ht: HeatTransfer "Heat Transfer in Solids" on all domains
    dependent variable T
    solid1: SolidHeatTransferModel "固体 1" (default)
    init1: init "初始值 1" (default)
    ins1: ThermalInsulation "热绝缘 1" (default)
    hs_battery: HeatSource "Battery Heat Source" on selection sel_battery
      Q0 = battery_power/(battery_dx*battery_dy*battery_dz*1e-9)
    hs_payload: HeatSource "Payload Heat Source" on selection sel_payload
      Q0 = payload_power/(payload_dx*payload_dy*payload_dz*1e-9)
    hf1: HeatFluxBoundary "Convection Boundary" on all boundaries | q0 = 10[W/(m^2*K)]*(T-ambient_temp)

Mesh
  mesh1 "网格 1" (physics-controlled)

Studies
  std1 "Steady-State Thermal Analysis"
    stat: Stationary "稳态"